// SBML level 3 version 1

function MM(km, Vmax, S)
  Vmax*S/(km + S);
end

function MMWithKcat(km, kcat, S, E)
  kcat*E*S/(km + S);
end

function NonCompetitiveInhibition(km, ki, Vmax, n, I, S)
  Vmax*S/((km + S)*(1 + (I/ki)^n));
end

function NonCompetitiveInhibitionWithKcat(km, ki, kcat, E, n, I, S)
  kcat*E*S/((km + S)*(1 + (I/ki)^n));
end

function NonCompetitiveInhibitionWithKcatAndExtraActivator(km, ki, kcat, E1, E2, n, I, S)
  kcat*E1*E2*S/((km + S)*(1 + (I/ki)^n));
end

function MA1(k, S)
  k*S;
end

function MA2(k, S1, S2)
  k*S1*S2;
end

function MA1Mod(k, S, M)
  k*S*M;
end

function MA2Mod(k, S1, S2, M)
  k*S1*S2*M;
end

function CompetitiveInhibitionWithKcat(km, ki, kcat, E, I, S)
  kcat*E*S/(km + S + km*I/ki);
end

function CompetitiveInhibition(Vmax, km, ki, I, S)
  Vmax*S/(km + S + km*I/ki);
end

function Hill(km, kcat, L, S, h)
  kcat*L*(S/km)^h/1 + (S/km)^h;
end

model SimpleAktModel()

  // Compartments:
  compartment default_compartment = 1;
  compartment Cell = 1;

  // Species:
  species $IRS1 in Cell;
  species IRS1pS636_639 in Cell = 0.861333;
  species $Akt in Cell;
  species AktpT308 in Cell = 0.486243;
  species $TSC2 in Cell;
  species TSC2pT1462 in Cell = 0.644957;
  species $PRAS40 in Cell;
  species PRAS40pT246 in Cell = 0.38719;
  species $S6K in Cell;
  species S6KpT389 in Cell = 0.395656;
  species $FourEBP1 in Cell;
  species FourE_BP1pT37_46 in Cell = 0.488169;
  species $Erk in Cell;
  species Erk_pT202_Y204 in Cell = 0.115661;
  species Feedback in default_compartment = 0;

  // Parameters:
  Insulin = 1;
  offset_amount = 1;
  _kIRS1Phos = 0.1;
  _kIRS1Dephos = 0.1;
  _kAktPhos_km = 0.1;
  _kAktPhos_kcat = 0.1;
  _kAktDephos = 0.1;
  _kTSC2Phos_km = 0.1;
  _kTSC2Phos_kcat = 0.1;
  _kTSC2Dephos = 0.1;
  _kPras40PhosByAkt_km = 0.1;
  _kPras40PhosByAkt_kcat = 0.1;
  _kPras40Dephos = 0.1;
  _kFourEBP1Phos_km = 0.1;
  _kFourEBP1Phos_kcat = 0.1;
  _kFourEBP1Dephos = 0.1;
  _kS6KPhos_km = 0.1;
  _kS6KPhos_kcat = 0.1;
  _kS6KDephos = 0.1;
  _kErkPhos_km = 0.1;
  _kErkPhos_kcat = 0.1;
  _kErkDephos = 0.1;
  _kFeedbackIn = 0.1;
  kFeedbackOut = 0.1;
  _kIRS1Phos_km = ;
  _kIRS1Phos_kcat = ;

  // Assignment rules:
  IRS1 := IRS1_tot - IRS1pS636_639;
  Akt := Akt_tot - AktpT308;
  TSC2 := TSC2_tot - TSC2pT1462;
  PRAS40 := PRAS40_tot - PRAS40pT246;
  S6K := S6K_tot - S6KpT389;
  FourEBP1 := FourEBP1_tot - FourE_BP1pT37_46;
  Erk := Erk_tot - Erk_pT202_Y204_obs;
  FourEBP1_tot := 0.458272 + offset_amount;
  Akt_tot := 1.241997 + offset_amount;
  IRS1_tot := 1.925974 + offset_amount;
  TSC2_tot := 1.136033 + offset_amount;
  PRAS40_tot := 0.981968 + offset_amount;
  S6K_tot := 1.330735 + offset_amount;
  Erk_tot := 1.305048 + offset_amount;
  IRS1pS636_639_obs := IRS1pS636_639;
  AktpT308_obs := AktpT308;
  TSC2pT1462_obs := TSC2pT1462;
  PRAS40pT246_obs := PRAS40pT246;
  S6KpT389_obs := S6KpT389;
  FourE_BP1pT37_46_obs := FourE_BP1pT37_46;
  Erk_pT202_Y204_obs := Erk_pT202_Y204;

  // Reactions:
  R1: $IRS1 => IRS1pS636_639; Cell*MMWithKcat(_kIRS1Phos_km, _kIRS1Phos_kcat, IRS1, Insulin);
  R2: IRS1pS636_639 => $IRS1; Cell*_kIRS1Dephos*IRS1pS636_639*S6KpT389;  // modifiers: S6KpT389
  R3: $Akt => AktpT308; Cell*MMWithKcat(_kAktPhos_km, _kAktPhos_kcat, Akt, IRS1pS636_639);  // modifiers: IRS1pS636_639
  R4: AktpT308 => $Akt; Cell*_kAktDephos*AktpT308;
  R5: $TSC2 => TSC2pT1462; Cell*MMWithKcat(_kTSC2Phos_km, _kTSC2Phos_kcat, TSC2, AktpT308);  // modifiers: AktpT308
  R6: TSC2pT1462 => $TSC2; Cell*_kTSC2Dephos*TSC2pT1462;
  R7: $PRAS40 => PRAS40pT246; Cell*MMWithKcat(_kPras40PhosByAkt_km, _kPras40PhosByAkt_kcat, PRAS40, AktpT308);  // modifiers: AktpT308
  R9: PRAS40pT246 => $PRAS40; Cell*_kPras40Dephos*TSC2pT1462;  // modifiers: TSC2pT1462
  R10: $FourEBP1 => FourE_BP1pT37_46; Cell*MMWithKcat(_kFourEBP1Phos_km, _kFourEBP1Phos_kcat, FourEBP1, TSC2);  // modifiers: TSC2
  R11: FourE_BP1pT37_46 => $FourEBP1; Cell*_kFourEBP1Dephos*FourE_BP1pT37_46;
  R12: $S6K => S6KpT389; Cell*MMWithKcat(_kS6KPhos_km, _kS6KPhos_kcat, S6K, TSC2);  // modifiers: TSC2
  R13: S6KpT389 => $S6K; Cell*_kS6KDephos*S6KpT389;
  R14: $Erk => Erk_pT202_Y204; Cell*MMWithKcat(_kErkPhos_km, _kErkPhos_kcat, Erk, Insulin);
  R15: Erk_pT202_Y204 => $Erk; Cell*_kErkDephos*Erk_pT202_Y204*Feedback;  // modifiers: Feedback
  R16: => Feedback; Cell*_kFeedbackIn*Erk_pT202_Y204;  // modifiers: Erk_pT202_Y204
  R17: Feedback => ; Cell*kFeedbackOut*Feedback;
end
